<neuroml xmlns="http://www.neuroml.org/schema/neuroml2"  xmlns:xs="http://www.w3.org/2001/XMLSchema" xmlns:xsi="http://www.w3.org/2001/XMLSchema-instance" xsi:schemaLocation="http://www.neuroml.org/schema/neuroml2 https://raw.github.com/NeuroML/NeuroML2/development/Schemas/NeuroML2/NeuroML_v2.3.1.xsd" id="Example7_Brunel2000">
    <notes>Generated by NeuroMLlite v0.5.9
    Generated network: Example7_Brunel2000
    Generation seed: 1234
    NeuroMLlite parameters:
        J = 0.1
        U0 = 0.0
        delay = 1.5
        epsilon = 0.1
        eta = 1
        g = 4
        order = 5
        tauMem = 20.0
        tauRef = 2.0
        tauSyn = 0.1
        theta = 20.0</notes>
    <IF_curr_alpha id="ifcell" cm="0.001" i_offset="0.0" tau_syn_E="0.1" tau_syn_I="0.1" v_init="0.0" tau_m="20.0" tau_refrac="2.0" v_reset="0.0" v_rest="0.0" v_thresh="20.0"/>
    <alphaCurrSynapse id="ampa" tau_syn="0.1"/>
    <alphaCurrSynapse id="gaba" tau_syn="0.1"/>
    <SpikeSourcePoisson id="poisson_input" start="0.0ms" duration="1000000000.0ms" rate="10000.0Hz"/>
    <network id="Example7_Brunel2000">
        <notes>Example 7: based on network of Brunel 2000</notes>
        <property tag="recommended_dt_ms" value="0.025"/>
        <property tag="recommended_duration_ms" value="1000.0"/>
        <population id="Epop" component="ifcell" size="20" type="populationList">
            <property tag="radius" value="5"/>
            <property tag="region" value="region1"/>
            <instance id="0">
                <location x="966.453535692138757" y="44.073259917535268" z="7.491470058587191"/>
            </instance>
            <instance id="1">
                <location x="910.975962449124154" y="93.926899736376399" z="582.227573058949133"/>
            </instance>
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        </population>
        <population id="expoisson" component="poisson_input" size="20" type="populationList">
            <property tag="radius" value="3"/>
            <property tag="region" value="region1"/>
            <instance id="0">
                <location x="41.062806271807474" y="38.618352833582826" z="349.592301963692535"/>
            </instance>
            <instance id="1">
                <location x="341.707792750453848" y="81.646305671423036" z="475.934908131728207"/>
            </instance>
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        </population>
        <population id="Ipop" component="ifcell" size="5" type="populationList">
            <property tag="radius" value="5"/>
            <property tag="region" value="region1"/>
            <instance id="0">
                <location x="174.689918402918693" y="58.451181056544065" z="301.77705779903232"/>
            </instance>
            <instance id="1">
                <location x="812.851394358916423" y="53.434074784115303" z="499.587304193232399"/>
            </instance>
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        </population>
        <population id="inpoisson" component="poisson_input" size="5" type="populationList">
            <property tag="radius" value="3"/>
            <property tag="region" value="region1"/>
            <instance id="0">
                <location x="1.706374199986094" y="67.469719842690694" z="638.280116674456622"/>
            </instance>
            <instance id="1">
                <location x="757.908774853525756" y="14.827392932422656" z="217.0336920016357"/>
            </instance>
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        </population>
        <projection id="projEinput" presynapticPopulation="expoisson" postsynapticPopulation="Epop" synapse="ampa">
            <connectionWD id="0" preCellId="../expoisson/0/poisson_input" postCellId="../Epop/0/ifcell" weight="0.000413635066326" delay="0.025ms"/>
            <connectionWD id="1" preCellId="../expoisson/1/poisson_input" postCellId="../Epop/1/ifcell" weight="0.000413635066326" delay="0.025ms"/>
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        </projection>
        <projection id="projIinput" presynapticPopulation="inpoisson" postsynapticPopulation="Ipop" synapse="ampa">
            <connectionWD id="0" preCellId="../inpoisson/0/poisson_input" postCellId="../Ipop/0/ifcell" weight="0.000413635066326" delay="0.025ms"/>
            <connectionWD id="1" preCellId="../inpoisson/1/poisson_input" postCellId="../Ipop/1/ifcell" weight="0.000413635066326" delay="0.025ms"/>
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        </projection>
        <projection id="projEE" presynapticPopulation="Epop" postsynapticPopulation="Epop" synapse="ampa">
            <connectionWD id="0" preCellId="../Epop/0/ifcell" postCellId="../Epop/4/ifcell" weight="0.000413635066326" delay="1.5ms"/>
            <connectionWD id="1" preCellId="../Epop/0/ifcell" postCellId="../Epop/14/ifcell" weight="0.000413635066326" delay="1.5ms"/>
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        </projection>
        <projection id="projEI" presynapticPopulation="Epop" postsynapticPopulation="Ipop" synapse="ampa">
            <connectionWD id="0" preCellId="../Epop/0/ifcell" postCellId="../Ipop/2/ifcell" weight="0.000413635066326" delay="1.5ms"/>
            <connectionWD id="1" preCellId="../Epop/6/ifcell" postCellId="../Ipop/2/ifcell" weight="0.000413635066326" delay="1.5ms"/>
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        </projection>
        <projection id="projIE" presynapticPopulation="Ipop" postsynapticPopulation="Epop" synapse="gaba">
            <connectionWD id="0" preCellId="../Ipop/0/ifcell" postCellId="../Epop/18/ifcell" weight="-0.001654540265306" delay="1.5ms"/>
            <connectionWD id="1" preCellId="../Ipop/1/ifcell" postCellId="../Epop/2/ifcell" weight="-0.001654540265306" delay="1.5ms"/>
            <connectionWD id="2" preCellId="../Ipop/1/ifcell" postCellId="../Epop/3/ifcell" weight="-0.001654540265306" delay="1.5ms"/>
            <connectionWD id="3" preCellId="../Ipop/4/ifcell" postCellId="../Epop/6/ifcell" weight="-0.001654540265306" delay="1.5ms"/>
        </projection>
        <projection id="projII" presynapticPopulation="Ipop" postsynapticPopulation="Ipop" synapse="gaba">
            <connectionWD id="0" preCellId="../Ipop/0/ifcell" postCellId="../Ipop/4/ifcell" weight="-0.001654540265306" delay="1.5ms"/>
            <connectionWD id="1" preCellId="../Ipop/2/ifcell" postCellId="../Ipop/4/ifcell" weight="-0.001654540265306" delay="1.5ms"/>
        </projection>
    </network>
</neuroml>
