<Lems>

    <!--

        This LEMS file has been automatically generated using PyNeuroML v0.3.18 (libNeuroML v0.2.47)

     -->

    <!-- Specify which component to run -->
    <Target component="SimExample4" reportFile="report.SimExample4.txt"/>

    <!-- Include core NeuroML2 ComponentType definitions -->
    <Include file="Cells.xml"/>
    <Include file="Networks.xml"/>
    <Include file="Simulation.xml"/>

    <Include file="PyNN.xml"/>
    <Include file="Example4_PyNN.net.nml"/>

    <Simulation id="SimExample4" length="1000.0ms" step="0.01ms" target="Example4_PyNN" seed="12345">  <!-- Note seed: ensures same random numbers used every run -->

        <Display id="DispPop__pop0" title="Membrane potentials of cells in pop0" timeScale="1ms" xmin="-100.0" xmax="1100.0" ymin="-90" ymax="50">
            <Line id="pop0[0]: v" quantity="pop0/0/testcell/v" scale="1mV" color="#6aa799" timeScale="1ms"/>
            <Line id="pop0[1]: v" quantity="pop0/1/testcell/v" scale="1mV" color="#029a72" timeScale="1ms"/>
        </Display>

        <Display id="DispPop__pop1" title="Membrane potentials of cells in pop1" timeScale="1ms" xmin="-100.0" xmax="1100.0" ymin="-90" ymax="50">
            <Line id="pop1[0]: v" quantity="pop1/0/testcell2/v" scale="1mV" color="#d340bb" timeScale="1ms"/>
            <Line id="pop1[1]: v" quantity="pop1/1/testcell2/v" scale="1mV" color="#4c73a9" timeScale="1ms"/>
        </Display>

        <Display id="DispPop__pop2" title="Membrane potentials of cells in pop2" timeScale="1ms" xmin="-100.0" xmax="1100.0" ymin="-90" ymax="50">
            <Line id="pop2[0]: v" quantity="pop2/0/testcell2/v" scale="1mV" color="#5e503a" timeScale="1ms"/>
        </Display>

        <OutputFile id="Volts_file__pop0" fileName="SimExample4.pop0.v.dat">
            <OutputColumn id="v_pop0_0_testcell_v" quantity="pop0/0/testcell/v"/>
            <OutputColumn id="v_pop0_1_testcell_v" quantity="pop0/1/testcell/v"/>
        </OutputFile>

        <OutputFile id="Volts_file__pop1" fileName="SimExample4.pop1.v.dat">
            <OutputColumn id="v_pop1_0_testcell2_v" quantity="pop1/0/testcell2/v"/>
            <OutputColumn id="v_pop1_1_testcell2_v" quantity="pop1/1/testcell2/v"/>
        </OutputFile>

        <OutputFile id="Volts_file__pop2" fileName="SimExample4.pop2.v.dat">
            <OutputColumn id="v_pop2_0_testcell2_v" quantity="pop2/0/testcell2/v"/>
        </OutputFile>

        <EventOutputFile id="Spikes_file__pop0" fileName="SimExample4.pop0.spikes" format="ID_TIME">
            <EventSelection id="0" select="pop0/0/testcell" eventPort="spike"/>
            <EventSelection id="1" select="pop0/1/testcell" eventPort="spike"/>
        </EventOutputFile>

    </Simulation>

</Lems>
