<Lems>

    <!--
    This LEMS file has been generated from:
        PyNN v0.9.2
        libNeuroML v0.2.40
        pyNeuroML v0.3.11
     -->

    <!-- Specify which component to run -->
    <Target component="Sim_Example4_PyNN"/>

    <!-- Include core NeuroML2 ComponentType definitions -->
    <Include file="Cells.xml"/>
    <Include file="Networks.xml"/>
    <Include file="Simulation.xml"/>

    <Include file="PyNN.xml"/>
    <Include file="Example4_PyNN.net.nml"/>

    <Simulation id="Sim_Example4_PyNN" length="1000.0ms" step="0.025ms" target="Example4_PyNN" seed="12345">  <!-- Note seed: ensures same random numbers used every run -->

        <Display id="pop2_v" title="pop2 v" timeScale="1ms" xmin="-100.0" xmax="1100.0" ymin="-70" ymax="10">
            <Line id="pop2 v: cell 46" quantity="pop2/0/IF_cond_alpha_pop2/v" scale="1mV" color="#26236c" timeScale="1ms"/>
        </Display>

        <Display id="pop1_v" title="pop1 v" timeScale="1ms" xmin="-100.0" xmax="1100.0" ymin="-70" ymax="10">
            <Line id="pop1 v: cell 44" quantity="pop1/0/IF_cond_alpha_pop1/v" scale="1mV" color="#7ec3aa" timeScale="1ms"/>
            <Line id="pop1 v: cell 45" quantity="pop1/1/IF_cond_alpha_pop1/v" scale="1mV" color="#dee2ad" timeScale="1ms"/>
        </Display>

        <Display id="pop0_v" title="pop0 v" timeScale="1ms" xmin="-100.0" xmax="1100.0" ymin="-70" ymax="10">
            <Line id="pop0 v: cell 42" quantity="pop0/0/IF_cond_alpha_pop0/v" scale="1mV" color="#36f0bf" timeScale="1ms"/>
            <Line id="pop0 v: cell 43" quantity="pop0/1/IF_cond_alpha_pop0/v" scale="1mV" color="#1fe246" timeScale="1ms"/>
        </Display>

        <OutputFile id="OF_pop2_v" fileName="pop2_v.dat">
            <OutputColumn id="pop2_0_IF_cond_alpha_pop2_v" quantity="pop2/0/IF_cond_alpha_pop2/v"/>
        </OutputFile>

        <OutputFile id="OF_pop1_v" fileName="pop1_v.dat">
            <OutputColumn id="pop1_0_IF_cond_alpha_pop1_v" quantity="pop1/0/IF_cond_alpha_pop1/v"/>
            <OutputColumn id="pop1_1_IF_cond_alpha_pop1_v" quantity="pop1/1/IF_cond_alpha_pop1/v"/>
        </OutputFile>

        <OutputFile id="OF_pop0_v" fileName="pop0_v.dat">
            <OutputColumn id="pop0_0_IF_cond_alpha_pop0_v" quantity="pop0/0/IF_cond_alpha_pop0/v"/>
            <OutputColumn id="pop0_1_IF_cond_alpha_pop0_v" quantity="pop0/1/IF_cond_alpha_pop0/v"/>
        </OutputFile>

    </Simulation>

</Lems>
