<Lems>

    <!-- Example showing new types of network populations & projection templates in v2 -->

    <!-- This is a file which can be read and executed by the LEMS Interpreter.
    It imports the LEMS definitions of the core NeuroML 2 Components, creates
    a model in "pure" NeuroML 2 and contains some LEMS elements for running
    a simulation -->

    <Target component="sim1"/>

    <Include file="NeuroMLCoreDimensions.xml"/>
    <Include file="Cells.xml"/>
    <Include file="Networks.xml"/>
    <Include file="Simulation.xml"/>

    <!-- NeuroML 2 elements... -->

    <spikeGenerator id="spiker" period="12ms"/>

    <spikeArray id="spikes2">
        <spike id="0" time="50ms"/>
        <spike id="1" time="100ms"/>
        <spike id="2" time="130ms"/>
    </spikeArray>

    <spikeArray id="spike100">
        <spike id="0" time="100ms"/>
    </spikeArray>

    <ComponentType name="impulseSynapse"
                   extends="baseCurrentBasedSynapse"
                   description="Syn...">

        <Property name="weight" dimension="none" defaultValue="1"/>

        <Constant name="PAMPERE" dimension="current" value="1pA"/>
        <Constant name="TSMALL" dimension="time" value="0.25e-5s"/>

        <Dynamics>

            <DerivedVariable name="i" exposure="i" dimension="current" value="PAMPERE * impulse"/>

            <StateVariable name="impulse" dimension="none" exposure="i"/>
            <StateVariable name="tlast" dimension="time"/>

            <TimeDerivative variable="impulse" value="0"/>
            <TimeDerivative variable="tlast" value="0"/>

            <OnStart>
                <StateAssignment variable="impulse" value="0" />
            </OnStart>

            <OnEvent port="in">
                <StateAssignment variable="impulse" value="weight" />
                <StateAssignment variable="tlast" value="t" />
            </OnEvent>

            <OnCondition test="t .gt. tlast+TSMALL">
                <StateAssignment variable="impulse" value="0"/>
            </OnCondition>

        </Dynamics>
    </ComponentType>

    <ComponentType name="intFire1Cell"
        extends="baseIaf"
        description="Integrate and fire cell ...">

        <Exposure name="iSyn" dimension="current" description="Total current due to synaptic inputs"/>
        <Parameter name="tau" dimension="time"/>
        <Parameter name="C" dimension="capacitance" description="Total capacitance of the cell membrane"/>
        <!--
        <Constant name="MIN_V" dimension="voltage" value="0mV"/>
        -->
        <Constant name="Mid_V" dimension="voltage" value="0.00mV"/>

        <Constant name="MVOLT" dimension="voltage" value="1 mV"/>
        <Constant name="PAMPERE" dimension="current" value="1pA"/>

        <Attachments name="synapses" type="basePointCurrent"/>

        <Dynamics>
            <StateVariable name="v" exposure="v" dimension="voltage"/>

            <TimeDerivative variable="v" value="(iSyn / C) + ((reset - v) / tau)"/>

            <DerivedVariable name="iSyn" dimension="current" exposure="iSyn" select="synapses[*]/i" reduce="add" />

            <OnStart>
                <StateAssignment variable="v" value="Mid_V"/>
            </OnStart>

            <OnCondition test="v .gt. thresh">
                <StateAssignment variable="v" value="reset"/>
                <EventOut port="spike"/>
            </OnCondition>

            <OnCondition test="iSyn .gt. 0">
                <StateAssignment variable="v" value="v + MVOLT*(iSyn/PAMPERE)"/>
                <EventOut port="spike"/>
            </OnCondition>

        </Dynamics>

    </ComponentType>

    <intFire1Cell id="if1" thresh="1mV" reset="0mV" tau="24ms" C="1e-5uF"/>

    <iafCell id="iaf1" leakReversal="-60mV" thresh="-35mV" reset="-65mV" C="1e-5uF" leakConductance="5e-7mS"/>
    <iafCell id="iaf2" leakReversal="-60mV" thresh="-35mV" reset="-70mV" C="1e-5uF" leakConductance="5.2e-7mS"/>

    <!--<expOneSynapse id="syn0" gbase="0.1nS" erev="10mV" tauDecay="24ms"/>-->
    <impulseSynapse id="syn0"/>

    <expOneSynapse id="syn1" gbase="0.1nS" erev="10mV" tauDecay="2ms"/>

    <expTwoSynapse id="syn2" gbase="0.1nS" erev="10mV" tauDecay="2ms" tauRise="0.05ms"/>

    <network id="net2">

        <population id="spikersPop" component="spiker" size="1"/>

        <population id="spikeArrayPop" component="spikes2" size="1"/>

        <population id="spike100Pop" component="spike100" size="1"/>

        <population id="iafPop" component="iaf1" size="7"/>
        <population id="if1Pop" component="if1" size="7"/>

        <projection id="projection1" presynapticPopulation="spike100Pop" postsynapticPopulation="iafPop" synapse="syn1">
            <connection preCellId="../spike100Pop[0]" postCellId="../iafPop[0]"/>
        </projection>

        <projection id="projection2" presynapticPopulation="spike100Pop" postsynapticPopulation="iafPop" synapse="syn1">
            <connectionWD preCellId="../spike100Pop[0]" postCellId="../iafPop[1]" weight="0.5"  delay="10ms" />
            <connectionWD preCellId="../spike100Pop[0]" postCellId="../iafPop[2]" weight="0.25" delay="15ms" />
        </projection>

        <projection id="projection3" presynapticPopulation="spikeArrayPop" postsynapticPopulation="iafPop" synapse="syn2">
            <connection preCellId="../spikeArrayPop[0]" postCellId="../iafPop[3]"/>
        </projection>

        <projection id="projection4" presynapticPopulation="spikeArrayPop" postsynapticPopulation="iafPop" synapse="syn2">
            <connectionWD preCellId="../spikeArrayPop[0]" postCellId="../iafPop[4]" weight="0.5"  delay="10ms" />
            <connectionWD preCellId="../spikeArrayPop[0]" postCellId="../iafPop[5]" weight="0.25" delay="15ms" />
        </projection>

        <projection id="projection1a" presynapticPopulation="spike100Pop" postsynapticPopulation="if1Pop" synapse="syn0">
            <connectionWD preCellId="../spike100Pop[0]" postCellId="../if1Pop[0]" weight=".1" delay="0ms" />
            <connectionWD preCellId="../spike100Pop[0]" postCellId="../if1Pop[1]" weight="0.05" delay="10ms" />
            <connectionWD preCellId="../spike100Pop[0]" postCellId="../if1Pop[2]" weight=".2" delay="15ms" />
        </projection>

        <projection id="projection1b" presynapticPopulation="spikersPop" postsynapticPopulation="if1Pop" synapse="syn0">
            <connectionWD preCellId="../spikersPop[0]" postCellId="../if1Pop[3]" weight=".4" delay="0ms" />
        </projection>

    </network>

    <!-- End of NeuroML 2 elements... -->

    <Simulation id="sim1" length="300ms" step="0.005ms" target="net2">

        <Display id="d1" title="Spiking elements" timeScale="1ms" xmin="0" xmax="300" ymin="-5" ymax="105">
            <Line id="30ms period spiker" quantity="spikersPop[0]/tsince" scale="1ms" color="#000000" timeScale="1ms"/>
            <Line id="Single spike at 100ms" quantity="spike100Pop[0]/tsince" scale="1ms" color="#ffff00" timeScale="1ms"/>
            <Line id="3 spikes" quantity="spikeArrayPop[0]/tsince" scale="1ms" color="#ff0000" timeScale="1ms"/>
        </Display>

        <Display id="d2" title="Single Exp Syns" timeScale="1ms" xmin="0" xmax="300" ymin="-61" ymax="-58">
            <Line id="No weight/delay" quantity="iafPop[0]/v" scale="1mV" color="#000000" timeScale="1ms"/>
            <Line id="Weight:0.5;delay=10ms" quantity="iafPop[1]/v" scale="1mV" color="#00ff00" timeScale="1ms"/>
            <Line id="Weight:0.25;delay=15ms" quantity="iafPop[2]/v" scale="1mV" color="#ff0000" timeScale="1ms"/>
        </Display>

        <Display id="d3" title="Double Exp Syns" timeScale="1ms" xmin="0" xmax="300" ymin="-61" ymax="-58">
            <Line id="No weight/delay" quantity="iafPop[3]/v" scale="1mV" color="#000000" timeScale="1ms"/>
            <Line id="Weight:0.5;delay=10ms" quantity="iafPop[4]/v" scale="1mV" color="#00ff00" timeScale="1ms"/>
            <Line id="Weight:0.25;delay=15ms" quantity="iafPop[5]/v" scale="1mV" color="#ff0000" timeScale="1ms"/>
        </Display>

        <Display id="d20" title="Inpulse syns: Membrane potentials" timeScale="1ms" xmin="0" xmax="300" ymin="-.1" ymax="1.1">
            <Line id="v: Weight:0.1;delay=0ms" quantity="if1Pop[0]/v" scale="1mV" color="#000000" timeScale="1ms"/>
            <Line id="v: Weight:0.05;delay=10ms" quantity="if1Pop[1]/v" scale="1mV" color="#00ff00" timeScale="1ms"/>
            <Line id="v: Weight:0.2;delay=15ms" quantity="if1Pop[2]/v" scale="1mV" color="#ff0000" timeScale="1ms"/>
        </Display>

        <Display id="d20b" title="Inpulse syns: Membrane potentials " timeScale="1ms" xmin="0" xmax="300" ymin="-.1" ymax="1.1">
            <Line id="v" quantity="if1Pop[3]/v" scale="1mV" color="#000000" timeScale="1ms"/>
        </Display>

        <Display id="d20a" title="Inpulse syns: currents" timeScale="1ms" xmin="0" xmax="300" ymin="-.1" ymax="1.1">
            <Line id="i: Weight:0.1;delay=0ms" quantity="if1Pop[0]/syn0/i" scale="1pS" color="#000000" timeScale="1ms"/>
            <Line id="i: Weight:0.05;delay=10ms" quantity="if1Pop[1]/syn0/i" scale="1pS" color="#fff000" timeScale="1ms"/>
            <Line id="i: Weight:0.2;delay=15ms" quantity="if1Pop[2]/syn0/i" scale="1pS" color="#000fff" timeScale="1ms"/>
        </Display>

        <OutputFile id="of0" fileName="ex0.dat">
            <OutputColumn id="0" quantity="iafPop[0]/v" />
            <OutputColumn id="1" quantity="iafPop[1]/v" />
            <OutputColumn id="2" quantity="iafPop[2]/v" />
            <OutputColumn id="3" quantity="iafPop[3]/v" />
            <OutputColumn id="4" quantity="iafPop[4]/v" />
            <OutputColumn id="5" quantity="iafPop[5]/v" />
            <OutputColumn id="6" quantity="iafPop[6]/v" />
        </OutputFile>

    </Simulation>

</Lems>
