<neuroml xmlns="http://www.neuroml.org/schema/neuroml2"  xmlns:xs="http://www.w3.org/2001/XMLSchema" xmlns:xsi="http://www.w3.org/2001/XMLSchema-instance" xsi:schemaLocation="http://www.neuroml.org/schema/neuroml2 https://raw.github.com/NeuroML/NeuroML2/development/Schemas/NeuroML2/NeuroML_v2beta5.xsd" id="Example_Layout">
    <notes>Generated by NeuroMLlite v0.1.8
    Generated network: Example_Layout
    Generation seed: 1234</notes>
    <include href="../../../examples/test_files/hhcell.cell.nml"/>
    <expTwoSynapse id="ampa" gbase="2nS" erev="0mV" tauDecay="2ms" tauRise="1ms"/>
    <network id="Example_Layout">
        <notes>....</notes>
        <population id="pop0" component="hhcell" size="1" type="populationList">
            <property tag="region" value="region1"/>
            <instance id="0">
                <location x="0." y="50." z="0."/>
            </instance>
        </population>
        <population id="pop1" component="hhcell" size="1" type="populationList">
            <property tag="region" value="region2"/>
            <instance id="0">
                <location x="1050." y="1000." z="1050."/>
            </instance>
        </population>
        <projection id="proj0" presynapticPopulation="pop0" postsynapticPopulation="pop1" synapse="ampa"/>
    </network>
</neuroml>
